folder simulations: version=37; creator=Apsim 7.10-r4220
  memo
    This biochar study was modified from the biochar sims used in the GCB-Bioenergy paper (Archontoulis et al., 2016)

    Archontoulis, S.V., Huber, I., Miguez, F.E., Thorburn, P.J., Rogovska, N., Laird, D.A., 2016. A model for mechanistic and system assessments of biochar effects on soils and crops and trade-offs. GCB Bioenergy 8, 1028–1045. doi:10.1111/gcbb.12314
  folder KBS
    simulation scen_1_56
      metfile met: filename=basic_wth_1.met
      clock
        start_date = 01/01/1989  # Enter the start date of the simulation
        end_date = 31/12/2099  # Enter the end date of the simulation
      summaryfile
      area paddock
        surfaceom SurfaceOrganicMatter
          PoolName = soybean  # Organic Matter pool name
          type = soybean  # Organic Matter type
          mass = 1000  # Initial surface residue (kg/ha)
          cnr = 27  # C:N ratio of initial residue
          standing_fraction = 0  # Fraction of residue standing
        fertiliser
        maize
        Soil Loam: SoilType=Kalamazoo:187069; State=MI; Country=USA; ApsoilNumber=0; Latitude=42.41; Longitude=-85.372; YearOfSampling=0
          DataSource=SSURGO (https://sdmdataaccess.nrcs.usda.gov/) through R package soilDB, R package apsimx function ssurgo2sp. Timestamp 2025-04-21 12:05:46
          Comments=cokey = 25285301 - acres percent = 95 - component percent = 95 - taxonomic classification name = Fine-loamy, mixed, active, mesic Typic Hapludalfs - drainage class = Well drained - elevation = 275 - slope = 3 - geomdesc = Head Slope, Interfluve, Nose Slope, Side Slope
          Water
            Thickness  BD    AirDry  LL15   DUL    SAT    KS
            200        1.56  0.034   0.03   0.26   0.434  33.355
            200        1.67  0.034   0.03   0.26   0.434  34.471
            200        1.67  0.034   0.03   0.26   0.434  34.471
            200        1.67  0.069   0.069  0.142  0.387  37.128
            200        1.67  0.069   0.069  0.142  0.387  37.128
            200        1.58  0.023   0.023  0.069  0.409  103.324
            200        1.58  0.023   0.023  0.069  0.409  103.324
            200        1.58  0.023   0.023  0.069  0.409  103.324
            200        1.52  0.023   0.001  0.033  0.431  282.637
            200        1.52  0.023   0.001  0.033  0.431  282.637
            BD source: Field measured and checked for sensibility (layer 2, 3, 4)
            AirDry source: Estimated based on local knowledge (layer 1, 2, 3, 4)
            LL15 source: Estimated based on local knowledge (layer 2, 3, 4)
            DUL source: Field measured and checked for sensibility (layer 1, 2, 3, 4)
            SAT source: Calculated from measured, estimated or calculated BD (layer 1, 2, 3, 4)
            SoilCrop maize
              LL=[0.1, 0.1, 0.1, 0.069, 0.069, 0.023, 0.023, 0.023, 0.023, 0.023]
              KL=[0.29, 0.28, 0.27, 0.03, 0.03, 0.02, 0.02, 0.02, 0.01, 0.01]
              XF=[0.8, 0.8, 0.8, 1, 1, 1, 1, 1, 1, 1]
              LL source: Estimated based on local knowledge (layer 2, 3, 4)
            SoilCrop soybean
              LL=[0.08, 0.08, 0.08, 0.069, 0.069, 0.023, 0.023, 0.023, 0.023, 0.023]
              KL=[0.29, 0.28, 0.27, 0.03, 0.03, 0.02, 0.02, 0.02, 0.01, 0.01]
              XF=[1, 1, 1, 1, 1, 1, 1, 1, 1, 1]
              LL source: Estimated based on local knowledge (layer 1, 2, 3, 4)
            SoilCrop wheat
              LL=[0.08, 0.08, 0.08, 0.069, 0.069, 0.023, 0.023, 0.023, 0.023, 0.023]
              KL=[0.06, 0.05, 0.04, 0.03, 0.03, 0.02, 0.02, 0.02, 0.01, 0.01]
              XF=[1, 1, 1, 1, 1, 1, 1, 1, 1, 1]
          SoilWater: SummerCona=3.2; SummerU=7.1; SummerDate=1-jun; WinterCona=3.2; WinterU=7.1; WinterDate=1-dec; DiffusConst=88; DiffusSlope=35; Salb=0.13; CN2Bare=63; CNRed=20; CNCov=0.8; Thickness=[90, 90, 240, 240, 230, 230, 300, 180]; SWCON=[0.36, 0.36, 0.355, 0.355, 0.271, 0.271, 0.266, 0.266]
          SoilOrganicMatter: RootCN=45; RootWt=1000; SoilCN=12; EnrACoeff=7.4; EnrBCoeff=0.2; OCUnits=Total
            Thickness  OC      FBiom       FInert
            200        0.951   0.04        0.8
            200        0.4438  0.0327492   0.80804
            200        0.4438  0.0268128   0.816161
            200        0.3549  0.0219525   0.824364
            200        0.3549  0.0179732   0.832649
            200        0.1     0.0147152   0.841017
            200        0.1     0.0120478   0.849469
            200        0.1     0.00986388  0.858007
            200        0.1     0.00807586  0.86663
            200        0.1     0.00661196  0.875339
            OC source: Estimated based on local knowledge (layer 1, 2, 3, 4)
          Analysis: PHUnits=Water; BoronUnits=HotWater
            Thickness  Texture  PH   ParticleSizeSand  ParticleSizeSilt  ParticleSizeClay
            200        L        5.5  43                38                19
            200        L        5.5  43                38                19
            200        L        5.5  43                38                19
            200        L        6.5  51                26                23
            200        L        6.5  71                17                12
            200        L        6.5  87                8                 5
            200        L        6.5  87                8                 5
            200        L        6.5  87                8                 5
            200        L        6.5  95                4                 1
            200        L        6.5  95                4                 1
            PH source: Estimated based on local knowledge (layer 1, 2, 3, 4)
            ParticleSizeSand, ParticleSizeSilt source: Measured (layer 1)
            ParticleSizeClay source: Measured (layer 1, 2)
          Sample Initial nitrogen: NO3Units=kgha; NH4Units=kgha; SWUnits=Volumetric; OCUnits=Total; PHUnits=Water
            Thickness  NO3       NH4        SW
            200        0.5       0.05       0
            200        0.495025  0.0495025  -
            200        0.490099  0.0490099  -
            200        0.485223  0.0485223  -
            200        0.480395  0.0480395  -
            200        0.475615  0.0475615  -
            200        0.470882  0.0470882  -
            200        0.466197  0.0466197  -
            200        0.461558  0.0461558  -
            200        0.456966  0.0456966  -
          InitialWater: FractionFull=0.65; PercentMethod=EvenlyDistributed; RelativeTo=ll15
        folder Manager folder
          manager Harvesting rule
            # Harvesting criteria
            crop = maize  # Enter name of crop to harvest when ripe
            on end_of_day:
```
           if ('[crop]' = 'cotton') then
              if ([crop].ozcot_status > 0) then
                  [crop] harvest
              endif
           elseif ([crop].StageName = 'harvest_ripe' or [crop].plant_status = 'dead') then
              [crop]  harvest
              [crop]  end_crop
           endif
```
          manager Harvesting rule1
            # Harvesting criteria
            crop = soybean  # Enter name of crop to harvest when ripe
            on end_of_day:
            script: same as in KBS.scen_1_56.paddock.Manager folder.Harvesting rule
          manager Harvesting rule2
            # Harvesting criteria
            crop = wheat  # Enter name of crop to harvest when ripe
            on end_of_day:
            script: same as in KBS.scen_1_56.paddock.Manager folder.Harvesting rule
          manager Remove residues at harvest
            # Removal criteria
            crop = maize  # Name of crop harvest to trigger residue removal
            surfaceommodule = SurfaceOrganicMatter  # Name of your surface organic matter module
            fraction = 0  # Enter biomass removal fraction from field (0-1)
            on init:
```
               last_stage_name = 'none'
```
            on start_of_day:
```
         if [crop].StageName <> last_stage_name  then
            if ([crop].StageName = 'out') then
               '[surfaceommodule]' tillage type = user_defined, f_incorp = [fraction] (), tillage_depth = 0.0 ()
            endif
         endif
         last_stage_name = [crop].StageName
```
          manager Remove residues at harvest1
            # Removal criteria
            crop = soybean  # Name of crop harvest to trigger residue removal
            surfaceommodule = SurfaceOrganicMatter  # Name of your surface organic matter module
            fraction = 0  # Enter biomass removal fraction from field (0-1)
            on init:
```
               last_stage_name = 'none'
```
            on start_of_day:
            script: same as in KBS.scen_1_56.paddock.Manager folder.Remove residues at harvest
          manager Remove residues at harvest2
            # Removal criteria
            crop = wheat  # Name of crop harvest to trigger residue removal
            surfaceommodule = SurfaceOrganicMatter  # Name of your surface organic matter module
            fraction = 0.0090  # Enter biomass removal fraction from field (0-1)
            on init:
```
               last_stage_name = 'none'
```
            on start_of_day:
            script: same as in KBS.scen_1_56.paddock.Manager folder.Remove residues at harvest
        outputfile: filename=scen_1_56.out; title=scen_1_56
          events Reporting Frequency: event=daily
          variables
            variable:
              dd/mm/yyyy as Date
              bd(1)
              yield
              sw(1)
              st(1)
              biomass
              stover
              dul(1)
              sat(1)
              ph(1)
              n2o_atm_denitrification(1-5) format 8 as n2o_bylayer_kgha
              oc(1-5) format 8 as oc_bylayer_kgha
              n2o_atm_denitrification(6-10) format 8 as n2o_bylayer_kgha
              no3(1-3)
              sw(2-3)
              dul(2-3)
              sat(2-3)
              biom_c(1-3)
              biom_n(1-3)
              hum_c(1-3)
              hum_n(1-3)
              dlt_res_c_biom(1-2)
              dlt_res_c_hum(1-2)
              dlt_biom_c_hum(1-2)
              st(2-3)
        soybean
        wheat
          ModifyKL = yes  # Modify KL using CL, EC or ESP if found?
          MaxRootDepth = 0  # Maximum rooting depth (mm) 0=no restriction
        operations Operations Schedule
          03/05/1989  maize sow plants = 6, sowing_depth = 50, cultivar = zhongdan2, row_spacing = 762, crop_class = plant
          29/06/1989  fertiliser apply amount = 124 (kg/ha), depth = 50 (mm), type = NO3_N
          28/05/1990  soybean sow plants = 47, sowing_depth = 50, cultivar = mg_4, row_spacing = 762, crop_class = plant
          02/05/1991  maize sow plants = 6, sowing_depth = 50, cultivar = zhongdan2, row_spacing = 762, crop_class = plant
          17/06/1991  fertiliser apply amount = 124 (kg/ha), depth = 50 (mm), type = NO3_N
          18/07/1991  fertiliser apply amount = 124 (kg/ha), depth = 50 (mm), type = NO3_N
          19/05/1992  soybean sow plants = 47, sowing_depth = 50, cultivar = mg_4, row_spacing = 762, crop_class = plant
          07/05/1993  maize sow plants = 6, sowing_depth = 50, cultivar = zhongdan2, row_spacing = 762, crop_class = plant
          01/07/1993  fertiliser apply amount = 84 (kg/ha), depth = 50 (mm), type = NO3_N
          20/05/1994  soybean sow plants = 49, sowing_depth = 50, cultivar = mg_4, row_spacing = 762, crop_class = plant
          12/10/1994  wheat sow plants = 445, sowing_depth = 50, cultivar = adagio, row_spacing = 178, crop_class = plant
          17/04/1995  fertiliser apply amount = 56 (kg/ha), depth = 50 (mm), type = NO3_N
          17/05/1996  fertiliser apply amount = 3 (kg/ha), depth = 50 (mm), type = NO3_N
          17/05/1996  maize sow plants = 6, sowing_depth = 50, cultivar = zhongdan2, row_spacing = 762, crop_class = plant
          28/06/1996  fertiliser apply amount = 135 (kg/ha), depth = 50 (mm), type = NO3_N
          10/04/1997  fertiliser apply amount = 45 (kg/ha), depth = 50 (mm), type = Rock_P
          21/05/1997  soybean sow plants = 47, sowing_depth = 50, cultivar = mg_4, row_spacing = 762, crop_class = plant
          22/10/1997  wheat sow plants = 445, sowing_depth = 50, cultivar = adagio, row_spacing = 178, crop_class = plant
          20/04/1998  fertiliser apply amount = 56 (kg/ha), depth = 50 (mm), type = NO3_N
          20/04/1999  fertiliser apply amount = 1796 (kg/ha), depth = 50 (mm), type = Calcite_CA
          14/05/1999  fertiliser apply amount = 27 (kg/ha), depth = 50 (mm), type = NO3_N
          14/05/1999  maize sow plants = 6, sowing_depth = 50, cultivar = zhongdan2, row_spacing = 762, crop_class = plant
          29/06/1999  fertiliser apply amount = 88 (kg/ha), depth = 50 (mm), type = NO3_N
          26/05/2000  fertiliser apply amount = 1 (kg/ha), depth = 50 (mm), type = NO3_N
          26/05/2000  soybean sow plants = 47, sowing_depth = 50, cultivar = mg_4, row_spacing = 762, crop_class = plant
          20/10/2000  fertiliser apply amount = 2470 (kg/ha), depth = 50 (mm), type = Calcite_CA
          23/10/2000  wheat sow plants = 544, sowing_depth = 50, cultivar = adagio, row_spacing = 178, crop_class = plant
          05/04/2001  fertiliser apply amount = 40 (kg/ha), depth = 50 (mm), type = NO3_N
          19/04/2001  fertiliser apply amount = 40 (kg/ha), depth = 50 (mm), type = NO3_N
          24/08/2001  fertiliser apply amount = 3 (kg/ha), depth = 50 (mm), type = NO3_N
          26/04/2002  fertiliser apply amount = 1 (kg/ha), depth = 50 (mm), type = NO3_N
          10/05/2002  fertiliser apply amount = 28 (kg/ha), depth = 50 (mm), type = NO3_N
          10/05/2002  fertiliser apply amount = 11 (kg/ha), depth = 50 (mm), type = Rock_P
          10/05/2002  maize sow plants = 7, sowing_depth = 50, cultivar = zhongdan2, row_spacing = 762, crop_class = plant
          01/07/2002  fertiliser apply amount = 134 (kg/ha), depth = 50 (mm), type = NO3_N
          26/04/2003  fertiliser apply amount = 7 (kg/ha), depth = 50 (mm), type = NO3_N
          26/04/2003  fertiliser apply amount = 14 (kg/ha), depth = 50 (mm), type = Rock_P
          27/05/2003  soybean sow plants = 44, sowing_depth = 50, cultivar = mg_4, row_spacing = 762, crop_class = plant
          08/10/2003  fertiliser apply amount = 36 (kg/ha), depth = 50 (mm), type = NO3_N
          08/10/2003  fertiliser apply amount = 16 (kg/ha), depth = 50 (mm), type = Rock_P
          09/10/2003  wheat sow plants = 494, sowing_depth = 50, cultivar = adagio, row_spacing = 178, crop_class = plant
          16/04/2004  fertiliser apply amount = 54 (kg/ha), depth = 50 (mm), type = NO3_N
          12/05/2005  fertiliser apply amount = 33 (kg/ha), depth = 50 (mm), type = NO3_N
          12/05/2005  fertiliser apply amount = 13 (kg/ha), depth = 50 (mm), type = Rock_P
          12/05/2005  maize sow plants = 7, sowing_depth = 50, cultivar = zhongdan2, row_spacing = 762, crop_class = plant
          21/06/2005  fertiliser apply amount = 124 (kg/ha), depth = 50 (mm), type = NO3_N
          24/05/2006  fertiliser apply amount = 1 (kg/ha), depth = 50 (mm), type = NO3_N
          12/06/2006  soybean sow plants = 44, sowing_depth = 50, cultivar = mg_4, row_spacing = 762, crop_class = plant
          01/11/2006  wheat sow plants = 494, sowing_depth = 50, cultivar = adagio, row_spacing = 178, crop_class = plant
          30/03/2007  fertiliser apply amount = 32 (kg/ha), depth = 50 (mm), type = NO3_N
          30/03/2007  fertiliser apply amount = 14 (kg/ha), depth = 50 (mm), type = Rock_P
          24/04/2007  fertiliser apply amount = 54 (kg/ha), depth = 50 (mm), type = NO3_N
          13/05/2008  fertiliser apply amount = 33 (kg/ha), depth = 50 (mm), type = NO3_N
          13/05/2008  fertiliser apply amount = 13 (kg/ha), depth = 50 (mm), type = Rock_P
          13/05/2008  maize sow plants = 7, sowing_depth = 50, cultivar = zhongdan2, row_spacing = 762, crop_class = plant
          19/06/2008  fertiliser apply amount = 114 (kg/ha), depth = 50 (mm), type = NO3_N
          21/05/2009  soybean sow plants = 44, sowing_depth = 50, cultivar = mg_4, row_spacing = 762, crop_class = plant
          23/06/2009  fertiliser apply amount = 1 (kg/ha), depth = 50 (mm), type = NO3_N
          20/10/2009  wheat sow plants = 498, sowing_depth = 50, cultivar = adagio, row_spacing = 178, crop_class = plant
          20/04/2010  fertiliser apply amount = 50 (kg/ha), depth = 50 (mm), type = NO3_N
          29/04/2010  fertiliser apply amount = 37 (kg/ha), depth = 50 (mm), type = NO3_N
          16/08/2010  fertiliser apply amount = 1 (kg/ha), depth = 50 (mm), type = NO3_N
          17/08/2010  fertiliser apply amount = 1 (kg/ha), depth = 50 (mm), type = NO3_N
          02/05/2011  fertiliser apply amount = 1 (kg/ha), depth = 50 (mm), type = NO3_N
          06/05/2011  fertiliser apply amount = 33 (kg/ha), depth = 50 (mm), type = NO3_N
          06/05/2011  fertiliser apply amount = 13 (kg/ha), depth = 50 (mm), type = Rock_P
          06/05/2011  maize sow plants = 7, sowing_depth = 50, cultivar = zhongdan2, row_spacing = 762, crop_class = plant
          15/06/2011  fertiliser apply amount = 124 (kg/ha), depth = 50 (mm), type = NO3_N
          11/04/2012  fertiliser apply amount = 0 (kg/ha), depth = 50 (mm), type = Calcite_CA
          23/04/2012  fertiliser apply amount = 8 (kg/ha), depth = 50 (mm), type = NO3_N
          23/04/2012  fertiliser apply amount = 17 (kg/ha), depth = 50 (mm), type = Rock_P
          10/05/2012  fertiliser apply amount = 1 (kg/ha), depth = 50 (mm), type = NO3_N
          19/05/2012  soybean sow plants = 44, sowing_depth = 50, cultivar = mg_4, row_spacing = 762, crop_class = plant
          25/06/2012  fertiliser apply amount = 1 (kg/ha), depth = 50 (mm), type = NO3_N
          29/10/2012  wheat sow plants = 445, sowing_depth = 50, cultivar = adagio, row_spacing = 178, crop_class = plant
          02/05/2013  fertiliser apply amount = 91 (kg/ha), depth = 50 (mm), type = NO3_N
          17/05/2013  fertiliser apply amount = 1 (kg/ha), depth = 50 (mm), type = NO3_N
          29/08/2013  fertiliser apply amount = 1 (kg/ha), depth = 50 (mm), type = NO3_N
          06/05/2014  fertiliser apply amount = 1 (kg/ha), depth = 50 (mm), type = NO3_N
          10/05/2014  fertiliser apply amount = 33 (kg/ha), depth = 50 (mm), type = NO3_N
          10/05/2014  fertiliser apply amount = 13 (kg/ha), depth = 50 (mm), type = Rock_P
          10/05/2014  maize sow plants = 7, sowing_depth = 50, cultivar = zhongdan2, row_spacing = 762, crop_class = plant
          20/05/2014  fertiliser apply amount = 33 (kg/ha), depth = 50 (mm), type = NO3_N
          20/05/2014  fertiliser apply amount = 13 (kg/ha), depth = 50 (mm), type = Rock_P
          18/06/2014  fertiliser apply amount = 134 (kg/ha), depth = 50 (mm), type = NO3_N
          14/04/2015  fertiliser apply amount = 10 (kg/ha), depth = 50 (mm), type = NO3_N
          14/04/2015  fertiliser apply amount = 26 (kg/ha), depth = 50 (mm), type = Rock_P
          20/05/2015  soybean sow plants = 44, sowing_depth = 50, cultivar = mg_4, row_spacing = 762, crop_class = plant
          22/05/2015  fertiliser apply amount = 1 (kg/ha), depth = 50 (mm), type = NO3_N
          23/07/2015  fertiliser apply amount = 1 (kg/ha), depth = 50 (mm), type = NO3_N
          02/10/2015  wheat sow plants = 445, sowing_depth = 50, cultivar = adagio, row_spacing = 178, crop_class = plant
          21/03/2016  fertiliser apply amount = 34 (kg/ha), depth = 50 (mm), type = NO3_N
          30/03/2016  fertiliser apply amount = 24 (kg/ha), depth = 50 (mm), type = NO3_N
          30/03/2016  fertiliser apply amount = 50 (kg/ha), depth = 50 (mm), type = Rock_P
          16/04/2016  fertiliser apply amount = 1 (kg/ha), depth = 50 (mm), type = NO3_N
          22/04/2016  fertiliser apply amount = 9 (kg/ha), depth = 50 (mm), type = NO3_N
          22/04/2016  fertiliser apply amount = 34 (kg/ha), depth = 50 (mm), type = NO3_N
          22/04/2016  fertiliser apply amount = 8 (kg/ha), depth = 50 (mm), type = Rock_P
          01/09/2016  fertiliser apply amount = 1 (kg/ha), depth = 50 (mm), type = NO3_N
          24/04/2017  fertiliser apply amount = 1 (kg/ha), depth = 50 (mm), type = NO3_N
          10/05/2017  fertiliser apply amount = 33 (kg/ha), depth = 50 (mm), type = NO3_N
          10/05/2017  fertiliser apply amount = 13 (kg/ha), depth = 50 (mm), type = Rock_P
          10/05/2017  maize sow plants = 8, sowing_depth = 50, cultivar = zhongdan2, row_spacing = 762, crop_class = plant
          15/05/2017  fertiliser apply amount = 33 (kg/ha), depth = 50 (mm), type = NO3_N
          15/05/2017  fertiliser apply amount = 13 (kg/ha), depth = 50 (mm), type = Rock_P
          09/06/2017  fertiliser apply amount = 1 (kg/ha), depth = 50 (mm), type = NO3_N
          21/06/2017  fertiliser apply amount = 138 (kg/ha), depth = 50 (mm), type = NO3_N
          08/05/2018  fertiliser apply amount = 1 (kg/ha), depth = 50 (mm), type = NO3_N
          25/05/2018  soybean sow plants = 36, sowing_depth = 50, cultivar = mg_4, row_spacing = 762, crop_class = plant
          12/07/2018  fertiliser apply amount = 1 (kg/ha), depth = 50 (mm), type = NO3_N
          10/10/2018  wheat sow plants = 485, sowing_depth = 50, cultivar = adagio, row_spacing = 178, crop_class = plant
          25/03/2019  fertiliser apply amount = 34 (kg/ha), depth = 50 (mm), type = NO3_N
          28/03/2019  fertiliser apply amount = 24 (kg/ha), depth = 50 (mm), type = NO3_N
          28/03/2019  fertiliser apply amount = 50 (kg/ha), depth = 50 (mm), type = Rock_P
          17/04/2019  fertiliser apply amount = 1 (kg/ha), depth = 50 (mm), type = NO3_N
          05/05/2019  fertiliser apply amount = 10 (kg/ha), depth = 50 (mm), type = NO3_N
          05/05/2019  fertiliser apply amount = 36 (kg/ha), depth = 50 (mm), type = NO3_N
          13/08/2019  fertiliser apply amount = 1 (kg/ha), depth = 50 (mm), type = NO3_N
          18/10/2019  fertiliser apply amount = 1 (kg/ha), depth = 50 (mm), type = NO3_N
          28/04/2020  fertiliser apply amount = 1 (kg/ha), depth = 50 (mm), type = NO3_N
          12/05/2020  fertiliser apply amount = 34 (kg/ha), depth = 50 (mm), type = NO3_N
          12/05/2020  fertiliser apply amount = 34 (kg/ha), depth = 50 (mm), type = Rock_P
          12/05/2020  maize sow plants = 8, sowing_depth = 50, cultivar = zhongdan2, row_spacing = 762, crop_class = plant
          18/06/2020  fertiliser apply amount = 138 (kg/ha), depth = 50 (mm), type = NO3_N
          25/06/2020  fertiliser apply amount = 1 (kg/ha), depth = 50 (mm), type = NO3_N
          10/05/2021  fertiliser apply amount = 10 (kg/ha), depth = 50 (mm), type = NO3_N
          10/05/2021  fertiliser apply amount = 26 (kg/ha), depth = 50 (mm), type = Rock_P
          11/05/2021  soybean sow plants = 37, sowing_depth = 50, cultivar = mg_4, row_spacing = 762, crop_class = plant
          27/07/2021  fertiliser apply amount = 1 (kg/ha), depth = 50 (mm), type = NO3_N
          18/10/2021  wheat sow plants = 489, sowing_depth = 50, cultivar = adagio, row_spacing = 178, crop_class = plant
          25/03/2022  fertiliser apply amount = 34 (kg/ha), depth = 50 (mm), type = NO3_N
          28/03/2022  fertiliser apply amount = 24 (kg/ha), depth = 50 (mm), type = NO3_N
          28/03/2022  fertiliser apply amount = 50 (kg/ha), depth = 50 (mm), type = Rock_P
          17/04/2022  fertiliser apply amount = 1 (kg/ha), depth = 50 (mm), type = NO3_N
          05/05/2022  fertiliser apply amount = 10 (kg/ha), depth = 50 (mm), type = NO3_N
          05/05/2022  fertiliser apply amount = 36 (kg/ha), depth = 50 (mm), type = NO3_N
          13/08/2022  fertiliser apply amount = 1 (kg/ha), depth = 50 (mm), type = NO3_N
          18/10/2022  fertiliser apply amount = 1 (kg/ha), depth = 50 (mm), type = NO3_N
          10/04/2023  surfaceorganicmatter tillage type = user_defined, f_incorp = 0.9, tillage_depth = 110
          28/04/2023  fertiliser apply amount = 1 (kg/ha), depth = 50 (mm), type = NO3_N
          12/05/2023  fertiliser apply amount = 34 (kg/ha), depth = 50 (mm), type = NO3_N
          12/05/2023  fertiliser apply amount = 34 (kg/ha), depth = 50 (mm), type = Rock_P
          12/05/2023  maize sow plants = 8, sowing_depth = 50, cultivar = zhongdan2, row_spacing = 762, crop_class = plant
          18/06/2023  fertiliser apply amount = 138 (kg/ha), depth = 50 (mm), type = NO3_N
          25/06/2023  fertiliser apply amount = 1 (kg/ha), depth = 50 (mm), type = NO3_N
          15/04/2024  surfaceorganicmatter tillage type = user_defined, f_incorp = 0.9, tillage_depth = 110
          20/04/2024  surfaceorganicmatter tillage type = user_defined, f_incorp = 0.5, tillage_depth = 30
          10/05/2024  fertiliser apply amount = 10 (kg/ha), depth = 50 (mm), type = NO3_N
          10/05/2024  fertiliser apply amount = 26 (kg/ha), depth = 50 (mm), type = Rock_P
          11/05/2024  soybean sow plants = 37, sowing_depth = 50, cultivar = mg_4, row_spacing = 762, crop_class = plant
          27/07/2024  fertiliser apply amount = 1 (kg/ha), depth = 50 (mm), type = NO3_N
          18/10/2024  wheat sow plants = 489, sowing_depth = 50, cultivar = adagio, row_spacing = 178, crop_class = plant
          25/03/2025  fertiliser apply amount = 34 (kg/ha), depth = 50 (mm), type = NO3_N
          28/03/2025  fertiliser apply amount = 24 (kg/ha), depth = 50 (mm), type = NO3_N
          28/03/2025  fertiliser apply amount = 50 (kg/ha), depth = 50 (mm), type = Rock_P
          17/04/2025  fertiliser apply amount = 1 (kg/ha), depth = 50 (mm), type = NO3_N
          05/05/2025  fertiliser apply amount = 10 (kg/ha), depth = 50 (mm), type = NO3_N
          05/05/2025  fertiliser apply amount = 36 (kg/ha), depth = 50 (mm), type = NO3_N
          13/08/2025  fertiliser apply amount = 1 (kg/ha), depth = 50 (mm), type = NO3_N
          18/10/2025  fertiliser apply amount = 1 (kg/ha), depth = 50 (mm), type = NO3_N
          10/04/2026  surfaceorganicmatter tillage type = user_defined, f_incorp = 0.9, tillage_depth = 110
          28/04/2026  fertiliser apply amount = 1 (kg/ha), depth = 50 (mm), type = NO3_N
          12/05/2026  fertiliser apply amount = 34 (kg/ha), depth = 50 (mm), type = NO3_N
          12/05/2026  fertiliser apply amount = 34 (kg/ha), depth = 50 (mm), type = Rock_P
          12/05/2026  maize sow plants = 8, sowing_depth = 50, cultivar = zhongdan2, row_spacing = 762, crop_class = plant
          18/06/2026  fertiliser apply amount = 138 (kg/ha), depth = 50 (mm), type = NO3_N
          25/06/2026  fertiliser apply amount = 1 (kg/ha), depth = 50 (mm), type = NO3_N
          15/04/2027  surfaceorganicmatter tillage type = user_defined, f_incorp = 0.9, tillage_depth = 110
          20/04/2027  surfaceorganicmatter tillage type = user_defined, f_incorp = 0.5, tillage_depth = 30
          10/05/2027  fertiliser apply amount = 10 (kg/ha), depth = 50 (mm), type = NO3_N
          10/05/2027  fertiliser apply amount = 26 (kg/ha), depth = 50 (mm), type = Rock_P
          11/05/2027  soybean sow plants = 37, sowing_depth = 50, cultivar = mg_4, row_spacing = 762, crop_class = plant
          27/07/2027  fertiliser apply amount = 1 (kg/ha), depth = 50 (mm), type = NO3_N
          18/10/2027  wheat sow plants = 489, sowing_depth = 50, cultivar = adagio, row_spacing = 178, crop_class = plant
          25/03/2028  fertiliser apply amount = 34 (kg/ha), depth = 50 (mm), type = NO3_N
          28/03/2028  fertiliser apply amount = 24 (kg/ha), depth = 50 (mm), type = NO3_N
          28/03/2028  fertiliser apply amount = 50 (kg/ha), depth = 50 (mm), type = Rock_P
          17/04/2028  fertiliser apply amount = 1 (kg/ha), depth = 50 (mm), type = NO3_N
          05/05/2028  fertiliser apply amount = 10 (kg/ha), depth = 50 (mm), type = NO3_N
          05/05/2028  fertiliser apply amount = 36 (kg/ha), depth = 50 (mm), type = NO3_N
          13/08/2028  fertiliser apply amount = 1 (kg/ha), depth = 50 (mm), type = NO3_N
          18/10/2028  fertiliser apply amount = 1 (kg/ha), depth = 50 (mm), type = NO3_N
          10/04/2029  surfaceorganicmatter tillage type = user_defined, f_incorp = 0.9, tillage_depth = 110
          28/04/2029  fertiliser apply amount = 1 (kg/ha), depth = 50 (mm), type = NO3_N
          12/05/2029  fertiliser apply amount = 34 (kg/ha), depth = 50 (mm), type = NO3_N
          12/05/2029  fertiliser apply amount = 34 (kg/ha), depth = 50 (mm), type = Rock_P
          12/05/2029  maize sow plants = 8, sowing_depth = 50, cultivar = zhongdan2, row_spacing = 762, crop_class = plant
          18/06/2029  fertiliser apply amount = 138 (kg/ha), depth = 50 (mm), type = NO3_N
          25/06/2029  fertiliser apply amount = 1 (kg/ha), depth = 50 (mm), type = NO3_N
          15/04/2030  surfaceorganicmatter tillage type = user_defined, f_incorp = 0.9, tillage_depth = 110
          20/04/2030  surfaceorganicmatter tillage type = user_defined, f_incorp = 0.5, tillage_depth = 30
          10/05/2030  fertiliser apply amount = 10 (kg/ha), depth = 50 (mm), type = NO3_N
          10/05/2030  fertiliser apply amount = 26 (kg/ha), depth = 50 (mm), type = Rock_P
          11/05/2030  soybean sow plants = 37, sowing_depth = 50, cultivar = mg_4, row_spacing = 762, crop_class = plant
          27/07/2030  fertiliser apply amount = 1 (kg/ha), depth = 50 (mm), type = NO3_N
          18/10/2030  wheat sow plants = 489, sowing_depth = 50, cultivar = adagio, row_spacing = 178, crop_class = plant
          25/03/2031  fertiliser apply amount = 34 (kg/ha), depth = 50 (mm), type = NO3_N
          28/03/2031  fertiliser apply amount = 24 (kg/ha), depth = 50 (mm), type = NO3_N
          28/03/2031  fertiliser apply amount = 50 (kg/ha), depth = 50 (mm), type = Rock_P
          17/04/2031  fertiliser apply amount = 1 (kg/ha), depth = 50 (mm), type = NO3_N
          05/05/2031  fertiliser apply amount = 10 (kg/ha), depth = 50 (mm), type = NO3_N
          05/05/2031  fertiliser apply amount = 36 (kg/ha), depth = 50 (mm), type = NO3_N
          13/08/2031  fertiliser apply amount = 1 (kg/ha), depth = 50 (mm), type = NO3_N
          18/10/2031  fertiliser apply amount = 1 (kg/ha), depth = 50 (mm), type = NO3_N
          10/04/2032  surfaceorganicmatter tillage type = user_defined, f_incorp = 0.9, tillage_depth = 110
          28/04/2032  fertiliser apply amount = 1 (kg/ha), depth = 50 (mm), type = NO3_N
          12/05/2032  fertiliser apply amount = 34 (kg/ha), depth = 50 (mm), type = NO3_N
          12/05/2032  fertiliser apply amount = 34 (kg/ha), depth = 50 (mm), type = Rock_P
          12/05/2032  maize sow plants = 8, sowing_depth = 50, cultivar = zhongdan2, row_spacing = 762, crop_class = plant
          18/06/2032  fertiliser apply amount = 138 (kg/ha), depth = 50 (mm), type = NO3_N
          25/06/2032  fertiliser apply amount = 1 (kg/ha), depth = 50 (mm), type = NO3_N
          15/04/2033  surfaceorganicmatter tillage type = user_defined, f_incorp = 0.9, tillage_depth = 110
          20/04/2033  surfaceorganicmatter tillage type = user_defined, f_incorp = 0.5, tillage_depth = 30
          10/05/2033  fertiliser apply amount = 10 (kg/ha), depth = 50 (mm), type = NO3_N
          10/05/2033  fertiliser apply amount = 26 (kg/ha), depth = 50 (mm), type = Rock_P
          11/05/2033  soybean sow plants = 37, sowing_depth = 50, cultivar = mg_4, row_spacing = 762, crop_class = plant
          27/07/2033  fertiliser apply amount = 1 (kg/ha), depth = 50 (mm), type = NO3_N
          18/10/2033  wheat sow plants = 489, sowing_depth = 50, cultivar = adagio, row_spacing = 178, crop_class = plant
          25/03/2034  fertiliser apply amount = 34 (kg/ha), depth = 50 (mm), type = NO3_N
          28/03/2034  fertiliser apply amount = 24 (kg/ha), depth = 50 (mm), type = NO3_N
          28/03/2034  fertiliser apply amount = 50 (kg/ha), depth = 50 (mm), type = Rock_P
          17/04/2034  fertiliser apply amount = 1 (kg/ha), depth = 50 (mm), type = NO3_N
          05/05/2034  fertiliser apply amount = 10 (kg/ha), depth = 50 (mm), type = NO3_N
          05/05/2034  fertiliser apply amount = 36 (kg/ha), depth = 50 (mm), type = NO3_N
          13/08/2034  fertiliser apply amount = 1 (kg/ha), depth = 50 (mm), type = NO3_N
          18/10/2034  fertiliser apply amount = 1 (kg/ha), depth = 50 (mm), type = NO3_N
          10/04/2035  surfaceorganicmatter tillage type = user_defined, f_incorp = 0.9, tillage_depth = 110
          28/04/2035  fertiliser apply amount = 1 (kg/ha), depth = 50 (mm), type = NO3_N
          12/05/2035  fertiliser apply amount = 34 (kg/ha), depth = 50 (mm), type = NO3_N
          12/05/2035  fertiliser apply amount = 34 (kg/ha), depth = 50 (mm), type = Rock_P
          12/05/2035  maize sow plants = 8, sowing_depth = 50, cultivar = zhongdan2, row_spacing = 762, crop_class = plant
          18/06/2035  fertiliser apply amount = 138 (kg/ha), depth = 50 (mm), type = NO3_N
          25/06/2035  fertiliser apply amount = 1 (kg/ha), depth = 50 (mm), type = NO3_N
          15/04/2036  surfaceorganicmatter tillage type = user_defined, f_incorp = 0.9, tillage_depth = 110
          20/04/2036  surfaceorganicmatter tillage type = user_defined, f_incorp = 0.5, tillage_depth = 30
          10/05/2036  fertiliser apply amount = 10 (kg/ha), depth = 50 (mm), type = NO3_N
          10/05/2036  fertiliser apply amount = 26 (kg/ha), depth = 50 (mm), type = Rock_P
          11/05/2036  soybean sow plants = 37, sowing_depth = 50, cultivar = mg_4, row_spacing = 762, crop_class = plant
          27/07/2036  fertiliser apply amount = 1 (kg/ha), depth = 50 (mm), type = NO3_N
          18/10/2036  wheat sow plants = 489, sowing_depth = 50, cultivar = adagio, row_spacing = 178, crop_class = plant
          25/03/2037  fertiliser apply amount = 34 (kg/ha), depth = 50 (mm), type = NO3_N
          28/03/2037  fertiliser apply amount = 24 (kg/ha), depth = 50 (mm), type = NO3_N
          28/03/2037  fertiliser apply amount = 50 (kg/ha), depth = 50 (mm), type = Rock_P
          17/04/2037  fertiliser apply amount = 1 (kg/ha), depth = 50 (mm), type = NO3_N
          05/05/2037  fertiliser apply amount = 10 (kg/ha), depth = 50 (mm), type = NO3_N
          05/05/2037  fertiliser apply amount = 36 (kg/ha), depth = 50 (mm), type = NO3_N
          13/08/2037  fertiliser apply amount = 1 (kg/ha), depth = 50 (mm), type = NO3_N
          18/10/2037  fertiliser apply amount = 1 (kg/ha), depth = 50 (mm), type = NO3_N
          10/04/2038  surfaceorganicmatter tillage type = user_defined, f_incorp = 0.9, tillage_depth = 110
          28/04/2038  fertiliser apply amount = 1 (kg/ha), depth = 50 (mm), type = NO3_N
          12/05/2038  fertiliser apply amount = 34 (kg/ha), depth = 50 (mm), type = NO3_N
          12/05/2038  fertiliser apply amount = 34 (kg/ha), depth = 50 (mm), type = Rock_P
          12/05/2038  maize sow plants = 8, sowing_depth = 50, cultivar = zhongdan2, row_spacing = 762, crop_class = plant
          18/06/2038  fertiliser apply amount = 138 (kg/ha), depth = 50 (mm), type = NO3_N
          25/06/2038  fertiliser apply amount = 1 (kg/ha), depth = 50 (mm), type = NO3_N
          15/04/2039  surfaceorganicmatter tillage type = user_defined, f_incorp = 0.9, tillage_depth = 110
          20/04/2039  surfaceorganicmatter tillage type = user_defined, f_incorp = 0.5, tillage_depth = 30
          10/05/2039  fertiliser apply amount = 10 (kg/ha), depth = 50 (mm), type = NO3_N
          10/05/2039  fertiliser apply amount = 26 (kg/ha), depth = 50 (mm), type = Rock_P
          11/05/2039  soybean sow plants = 37, sowing_depth = 50, cultivar = mg_4, row_spacing = 762, crop_class = plant
          27/07/2039  fertiliser apply amount = 1 (kg/ha), depth = 50 (mm), type = NO3_N
          18/10/2039  wheat sow plants = 489, sowing_depth = 50, cultivar = adagio, row_spacing = 178, crop_class = plant
          25/03/2040  fertiliser apply amount = 34 (kg/ha), depth = 50 (mm), type = NO3_N
          28/03/2040  fertiliser apply amount = 24 (kg/ha), depth = 50 (mm), type = NO3_N
          28/03/2040  fertiliser apply amount = 50 (kg/ha), depth = 50 (mm), type = Rock_P
          17/04/2040  fertiliser apply amount = 1 (kg/ha), depth = 50 (mm), type = NO3_N
          05/05/2040  fertiliser apply amount = 10 (kg/ha), depth = 50 (mm), type = NO3_N
          05/05/2040  fertiliser apply amount = 36 (kg/ha), depth = 50 (mm), type = NO3_N
          13/08/2040  fertiliser apply amount = 1 (kg/ha), depth = 50 (mm), type = NO3_N
          18/10/2040  fertiliser apply amount = 1 (kg/ha), depth = 50 (mm), type = NO3_N
          10/04/2041  surfaceorganicmatter tillage type = user_defined, f_incorp = 0.9, tillage_depth = 110
          28/04/2041  fertiliser apply amount = 1 (kg/ha), depth = 50 (mm), type = NO3_N
          12/05/2041  fertiliser apply amount = 34 (kg/ha), depth = 50 (mm), type = NO3_N
          12/05/2041  fertiliser apply amount = 34 (kg/ha), depth = 50 (mm), type = Rock_P
          12/05/2041  maize sow plants = 8, sowing_depth = 50, cultivar = zhongdan2, row_spacing = 762, crop_class = plant
          18/06/2041  fertiliser apply amount = 138 (kg/ha), depth = 50 (mm), type = NO3_N
          25/06/2041  fertiliser apply amount = 1 (kg/ha), depth = 50 (mm), type = NO3_N
          15/04/2042  surfaceorganicmatter tillage type = user_defined, f_incorp = 0.9, tillage_depth = 110
          20/04/2042  surfaceorganicmatter tillage type = user_defined, f_incorp = 0.5, tillage_depth = 30
          10/05/2042  fertiliser apply amount = 10 (kg/ha), depth = 50 (mm), type = NO3_N
          10/05/2042  fertiliser apply amount = 26 (kg/ha), depth = 50 (mm), type = Rock_P
          11/05/2042  soybean sow plants = 37, sowing_depth = 50, cultivar = mg_4, row_spacing = 762, crop_class = plant
          27/07/2042  fertiliser apply amount = 1 (kg/ha), depth = 50 (mm), type = NO3_N
          18/10/2042  wheat sow plants = 489, sowing_depth = 50, cultivar = adagio, row_spacing = 178, crop_class = plant
          25/03/2043  fertiliser apply amount = 34 (kg/ha), depth = 50 (mm), type = NO3_N
          28/03/2043  fertiliser apply amount = 24 (kg/ha), depth = 50 (mm), type = NO3_N
          28/03/2043  fertiliser apply amount = 50 (kg/ha), depth = 50 (mm), type = Rock_P
          17/04/2043  fertiliser apply amount = 1 (kg/ha), depth = 50 (mm), type = NO3_N
          05/05/2043  fertiliser apply amount = 10 (kg/ha), depth = 50 (mm), type = NO3_N
          05/05/2043  fertiliser apply amount = 36 (kg/ha), depth = 50 (mm), type = NO3_N
          13/08/2043  fertiliser apply amount = 1 (kg/ha), depth = 50 (mm), type = NO3_N
          18/10/2043  fertiliser apply amount = 1 (kg/ha), depth = 50 (mm), type = NO3_N
          10/04/2044  surfaceorganicmatter tillage type = user_defined, f_incorp = 0.9, tillage_depth = 110
          28/04/2044  fertiliser apply amount = 1 (kg/ha), depth = 50 (mm), type = NO3_N
          12/05/2044  fertiliser apply amount = 34 (kg/ha), depth = 50 (mm), type = NO3_N
          12/05/2044  fertiliser apply amount = 34 (kg/ha), depth = 50 (mm), type = Rock_P
          12/05/2044  maize sow plants = 8, sowing_depth = 50, cultivar = zhongdan2, row_spacing = 762, crop_class = plant
          18/06/2044  fertiliser apply amount = 138 (kg/ha), depth = 50 (mm), type = NO3_N
          25/06/2044  fertiliser apply amount = 1 (kg/ha), depth = 50 (mm), type = NO3_N
          15/04/2045  surfaceorganicmatter tillage type = user_defined, f_incorp = 0.9, tillage_depth = 110
          20/04/2045  surfaceorganicmatter tillage type = user_defined, f_incorp = 0.5, tillage_depth = 30
          10/05/2045  fertiliser apply amount = 10 (kg/ha), depth = 50 (mm), type = NO3_N
          10/05/2045  fertiliser apply amount = 26 (kg/ha), depth = 50 (mm), type = Rock_P
          11/05/2045  soybean sow plants = 37, sowing_depth = 50, cultivar = mg_4, row_spacing = 762, crop_class = plant
          27/07/2045  fertiliser apply amount = 1 (kg/ha), depth = 50 (mm), type = NO3_N
          18/10/2045  wheat sow plants = 489, sowing_depth = 50, cultivar = adagio, row_spacing = 178, crop_class = plant
          25/03/2046  fertiliser apply amount = 34 (kg/ha), depth = 50 (mm), type = NO3_N
          28/03/2046  fertiliser apply amount = 24 (kg/ha), depth = 50 (mm), type = NO3_N
          28/03/2046  fertiliser apply amount = 50 (kg/ha), depth = 50 (mm), type = Rock_P
          17/04/2046  fertiliser apply amount = 1 (kg/ha), depth = 50 (mm), type = NO3_N
          05/05/2046  fertiliser apply amount = 10 (kg/ha), depth = 50 (mm), type = NO3_N
          05/05/2046  fertiliser apply amount = 36 (kg/ha), depth = 50 (mm), type = NO3_N
          13/08/2046  fertiliser apply amount = 1 (kg/ha), depth = 50 (mm), type = NO3_N
          18/10/2046  fertiliser apply amount = 1 (kg/ha), depth = 50 (mm), type = NO3_N
          10/04/2047  surfaceorganicmatter tillage type = user_defined, f_incorp = 0.9, tillage_depth = 110
          28/04/2047  fertiliser apply amount = 1 (kg/ha), depth = 50 (mm), type = NO3_N
          12/05/2047  fertiliser apply amount = 34 (kg/ha), depth = 50 (mm), type = NO3_N
          12/05/2047  fertiliser apply amount = 34 (kg/ha), depth = 50 (mm), type = Rock_P
          12/05/2047  maize sow plants = 8, sowing_depth = 50, cultivar = zhongdan2, row_spacing = 762, crop_class = plant
          18/06/2047  fertiliser apply amount = 138 (kg/ha), depth = 50 (mm), type = NO3_N
          25/06/2047  fertiliser apply amount = 1 (kg/ha), depth = 50 (mm), type = NO3_N
          15/04/2048  surfaceorganicmatter tillage type = user_defined, f_incorp = 0.9, tillage_depth = 110
          20/04/2048  surfaceorganicmatter tillage type = user_defined, f_incorp = 0.5, tillage_depth = 30
          10/05/2048  fertiliser apply amount = 10 (kg/ha), depth = 50 (mm), type = NO3_N
          10/05/2048  fertiliser apply amount = 26 (kg/ha), depth = 50 (mm), type = Rock_P
          11/05/2048  soybean sow plants = 37, sowing_depth = 50, cultivar = mg_4, row_spacing = 762, crop_class = plant
          27/07/2048  fertiliser apply amount = 1 (kg/ha), depth = 50 (mm), type = NO3_N
          18/10/2048  wheat sow plants = 489, sowing_depth = 50, cultivar = adagio, row_spacing = 178, crop_class = plant
          25/03/2049  fertiliser apply amount = 34 (kg/ha), depth = 50 (mm), type = NO3_N
          28/03/2049  fertiliser apply amount = 24 (kg/ha), depth = 50 (mm), type = NO3_N
          28/03/2049  fertiliser apply amount = 50 (kg/ha), depth = 50 (mm), type = Rock_P
          17/04/2049  fertiliser apply amount = 1 (kg/ha), depth = 50 (mm), type = NO3_N
          05/05/2049  fertiliser apply amount = 10 (kg/ha), depth = 50 (mm), type = NO3_N
          05/05/2049  fertiliser apply amount = 36 (kg/ha), depth = 50 (mm), type = NO3_N
          13/08/2049  fertiliser apply amount = 1 (kg/ha), depth = 50 (mm), type = NO3_N
          18/10/2049  fertiliser apply amount = 1 (kg/ha), depth = 50 (mm), type = NO3_N
          10/04/2050  surfaceorganicmatter tillage type = user_defined, f_incorp = 0.9, tillage_depth = 110
          28/04/2050  fertiliser apply amount = 1 (kg/ha), depth = 50 (mm), type = NO3_N
          12/05/2050  fertiliser apply amount = 34 (kg/ha), depth = 50 (mm), type = NO3_N
          12/05/2050  fertiliser apply amount = 34 (kg/ha), depth = 50 (mm), type = Rock_P
          12/05/2050  maize sow plants = 8, sowing_depth = 50, cultivar = zhongdan2, row_spacing = 762, crop_class = plant
          18/06/2050  fertiliser apply amount = 138 (kg/ha), depth = 50 (mm), type = NO3_N
          25/06/2050  fertiliser apply amount = 1 (kg/ha), depth = 50 (mm), type = NO3_N
          15/04/2051  surfaceorganicmatter tillage type = user_defined, f_incorp = 0.9, tillage_depth = 110
          20/04/2051  surfaceorganicmatter tillage type = user_defined, f_incorp = 0.5, tillage_depth = 30
          10/05/2051  fertiliser apply amount = 10 (kg/ha), depth = 50 (mm), type = NO3_N
          10/05/2051  fertiliser apply amount = 26 (kg/ha), depth = 50 (mm), type = Rock_P
          11/05/2051  soybean sow plants = 37, sowing_depth = 50, cultivar = mg_4, row_spacing = 762, crop_class = plant
          27/07/2051  fertiliser apply amount = 1 (kg/ha), depth = 50 (mm), type = NO3_N
          18/10/2051  wheat sow plants = 489, sowing_depth = 50, cultivar = adagio, row_spacing = 178, crop_class = plant
    simulation scen_1_54 -> /simulations/KBS/scen_1_56
      area paddock -> /simulations/KBS/scen_1_56/paddock
        Soil Loam -> /simulations/KBS/scen_1_56/paddock/Loam
          Water
            Thickness  BD    AirDry      LL15       DUL        SAT       KS
            200        1.54  0.0337691   0.03       0.26       0.442293  30.6282
            200        1.63  0.0337691   0.03       0.26       0.442097  30.548
            200        1.63  0.0337691   0.03       0.26       0.442097  30.548
            200        1.63  0.138224    0.13821    0.246112   0.394581  8.42762
            200        1.63  0.069166    0.0691964  0.142277   0.387558  37.1382
            200        1.58  0.02266792  0.022687   0.0694457  0.408543  103.324
            200        1.58  0.02266792  0.022687   0.0694457  0.408543  103.324
            200        1.58  0.02266792  0.022687   0.0694457  0.408543  103.324
            200        1.52  0.023       0.001      0.0325597  0.430947  282.637
            200        1.52  0.023       0.001      0.0325597  0.430947  282.637
            BD source: Field measured and checked for sensibility (layer 2, 3, 4)
            AirDry source: Estimated based on local knowledge (layer 1, 2, 3, 4)
            LL15 source: Estimated based on local knowledge (layer 2, 3, 4)
            DUL source: Field measured and checked for sensibility (layer 1, 2, 3, 4)
            SAT source: Calculated from measured, estimated or calculated BD (layer 1, 2, 3, 4)
            SoilCrop maize
              LL=[0.068, 0.068, 0.068, 0.138, 0.069, 0.023, 0.023, 0.023, 0.023, 0.023]
              KL=[0.06, 0.049, 0.04, 0.033, 0.027, 0.022, 0.018, 0.02, 0.012, 0.01]
              XF=[1, 1, 1, 1, 1, 1, 1, 1, 1, 1]
              LL source: Estimated based on local knowledge (layer 2, 3, 4)
            SoilCrop soybean
              LL=[0.068, 0.068, 0.068, 0.138, 0.069, 0.023, 0.023, 0.023, 0.023, 0.023]
              KL=[0.06, 0.05, 0.04, 0.03, 0.03, 0.02, 0.02, 0.02, 0.012, 0.01]
              XF=[1, 1, 1, 1, 1, 1, 1, 1, 1, 1]
              LL source: Estimated based on local knowledge (layer 1, 2, 3, 4)
            SoilCrop wheat
              LL=[0.068, 0.068, 0.068, 0.138, 0.069, 0.023, 0.023, 0.023, 0.023, 0.023]
              KL=[0.06, 0.05, 0.04, 0.03, 0.03, 0.02, 0.02, 0.02, 0.012, 0.01]
              XF=[1, 1, 1, 1, 1, 1, 1, 1, 1, 1]
          SoilWater: same as KBS.scen_1_56.paddock.Loam.SoilWater
          Sample Initial nitrogen: same as KBS.scen_1_56.paddock.Loam.Initial nitrogen
          InitialWater: FractionFull=0.65; PercentMethod=EvenlyDistributed; RelativeTo=ll15
        folder Manager folder -> /simulations/KBS/scen_1_56/paddock/Manager folder
          manager Remove residues at harvest
            # Removal criteria
            crop = maize  # Name of crop harvest to trigger residue removal
            surfaceommodule = SurfaceOrganicMatter  # Name of your surface organic matter module
            fraction = 0.0050  # Enter biomass removal fraction from field (0-1)
            on init:
```
               last_stage_name = 'none'
```
            on start_of_day:
            script: same as in KBS.scen_1_56.paddock.Manager folder.Remove residues at harvest
          manager Remove residues at harvest1
            # Removal criteria
            crop = soybean  # Name of crop harvest to trigger residue removal
            surfaceommodule = SurfaceOrganicMatter  # Name of your surface organic matter module
            fraction = 0.0050  # Enter biomass removal fraction from field (0-1)
            on init:
```
               last_stage_name = 'none'
```
            on start_of_day:
            script: same as in KBS.scen_1_56.paddock.Manager folder.Remove residues at harvest
        outputfile: filename=scen_1_54.out; title=scen_1_54
          events Reporting Frequency -> /simulations/KBS/scen_1_56/paddock/outputfile/Reporting Frequency
          variables: same as KBS.scen_1_56.paddock.outputfile.Variables
        operations Operations Schedule: same as KBS.scen_1_56.paddock.Operations Schedule
    simulation scen_1_55 -> /simulations/KBS/scen_1_56
      area paddock -> /simulations/KBS/scen_1_56/paddock
        Soil Loam -> /simulations/KBS/scen_1_56/paddock/Loam
          Water: same as KBS.scen_1_54.paddock.Loam.Water
          SoilWater: same as KBS.scen_1_56.paddock.Loam.SoilWater
          Sample Initial nitrogen: same as KBS.scen_1_56.paddock.Loam.Initial nitrogen
          InitialWater: FractionFull=0.65; PercentMethod=EvenlyDistributed; RelativeTo=ll15
        folder Manager folder -> /simulations/KBS/scen_1_56/paddock/Manager folder
          manager Remove residues at harvest
            # Removal criteria
            crop = maize  # Name of crop harvest to trigger residue removal
            surfaceommodule = SurfaceOrganicMatter  # Name of your surface organic matter module
            fraction = 0.0025  # Enter biomass removal fraction from field (0-1)
            on init:
```
               last_stage_name = 'none'
```
            on start_of_day:
            script: same as in KBS.scen_1_56.paddock.Manager folder.Remove residues at harvest
          manager Remove residues at harvest1
            # Removal criteria
            crop = soybean  # Name of crop harvest to trigger residue removal
            surfaceommodule = SurfaceOrganicMatter  # Name of your surface organic matter module
            fraction = 0.0025  # Enter biomass removal fraction from field (0-1)
            on init:
```
               last_stage_name = 'none'
```
            on start_of_day:
            script: same as in KBS.scen_1_56.paddock.Manager folder.Remove residues at harvest
        outputfile: filename=scen_1_55.out; title=scen_1_55
          events Reporting Frequency -> /simulations/KBS/scen_1_56/paddock/outputfile/Reporting Frequency
          variables: same as KBS.scen_1_56.paddock.outputfile.Variables
        operations Operations Schedule: same as KBS.scen_1_56.paddock.Operations Schedule
  factorial Factorials: active=0
    settings
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